# OpenSim document version 30516
Model:
  Body: mass=1 [kg] mass_center=(0 0 0) inertia=(1 1 1 0 0 0)
  FreeJoint joint: socket_parent_frame_connectee_name=../model/ground socket_child_frame_connectee_name=body
    Coordinate joint_coord_0
    Coordinate joint_coord_1
    Coordinate joint_coord_2
    Coordinate joint_coord_3
    Coordinate joint_coord_4
    Coordinate joint_coord_5
  TableReporter__Vec3_ reporter: report_time_interval=0.1 [s]
      input_inputs_connectee_names=(../model/body|position ../model|com_position(com_pos))
