# OpenSim document version 30516
Model model_:
  ConsoleReporter__double_ reporter: report_time_interval=1 [s]
      input_inputs_connectee_names=(../biceps|fiber_force ../elbow/elbow_coord_0|value(elbow_angle))
  Ground
  BodySet:
    Body Humerus: mass=1 [kg] mass_center=(0 0 0) inertia=(0 0 0 0 0 0)
      PhysicalOffsetFrame humerusCenter: socket_parent_connectee_name=.. translation=(0 0.5 0)
        Ellipsoid humerusCenter_geom_1: socket_frame_connectee_name=.. radii=(0.1 0.5 0.1)
    Body radius: mass=1 mass_center=(0 0 0) inertia=(0 0 0 0 0 0)
      PhysicalOffsetFrame radiusCenter: socket_parent_connectee_name=.. translation=(0 0.5 0)
        Ellipsoid radiusCenter_geom_1: socket_frame_connectee_name=.. radii=(0.1 0.5 0.1)
  JointSet:
    PinJoint shoulder: socket_parent_frame_connectee_name=ground_offset
        socket_child_frame_connectee_name=Humerus_offset
      Coordinate shoulder_coord_0
      PhysicalOffsetFrame ground_offset: socket_parent_connectee_name=../../ground translation=(0 0 0)
      PhysicalOffsetFrame Humerus_offset: socket_parent_connectee_name=../../Humerus translation=(0 1 0)
    PinJoint elbow: socket_parent_frame_connectee_name=Humerus_offset socket_child_frame_connectee_name=radius_offset
      Coordinate elbow_coord_0
      PhysicalOffsetFrame Humerus_offset: socket_parent_connectee_name=../../Humerus translation=(0 0 0)
      PhysicalOffsetFrame radius_offset: socket_parent_connectee_name=../../radius translation=(0 1 0)
          orientation=(0 1 0)
  ControllerSet:
    PrescribedController prescribedcontroller_: actuator_list=biceps
      FunctionSet ControlFunctions:
        StepFunction: transition_start_time=0.5 transition_end_time=3 start_value=0.3 end_value=1
  ForceSet:
    Millard2012EquilibriumMuscle biceps: min_control=0.01 max_control=1 max_isometric_force=200
        optimal_fiber_length=0.6 tendon_slack_length=0.55 pennation_angle_at_optimal=0 [radians]
        minimum_activation=0.01
      PathPoint origin: socket_parent_frame_connectee_name=../../../Humerus (0 0.8 0)
      PathPoint insertion: socket_parent_frame_connectee_name=../../../radius (0 0.7 0)
      ActiveForceLengthCurve: minimum_value=0
      ForceVelocityCurve: concentric_slope_at_vmax=0 concentric_slope_near_vmax=0.25 isometric_slope=5
          eccentric_slope_at_vmax=0 eccentric_slope_near_vmax=0.15 max_eccentric_velocity_force_multiplier=1.4
      FiberForceLengthCurve
      TendonForceLengthCurve
